# ÏÐÈËÎÆÅÍÈÅ Г
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Jkc := 1.75
Ck := 6.28
g := 9.8
γΣ := 0.349
φk := 1.43
ω[1] := 10.47
Kd := 1.4
mc := 5
Rc := 0.3
γ0 := 1.047
n := 2
Pус := 5
Pp := 2
lpr := 0.1
A := 0.5
b := 0.3
m2 := 0.5
f1 := 0.3
ck := 0.97
ν := 115
η := 0.87
Fvr := 20
Pn := 30
f2 := 0.3
m1 := 0.4
δ := 1.047
εpp := 5
Rpp := 0.065
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α := 0, 0.0001 .. 6.28
Ck(α) := 2*π*sin(α)
εкс(α) := Ck(α)*γΣ/φk^2*ω[1]^2
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Mин(α) := Jkc*εкс(α)
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Kd = 1.4
Mин(α) := Kd*Ck(α)*Jkc*γΣ/φk^2*ω[1]^2
γΣ = 0.349
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Н*м
рад
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αk(α) := α/(2*π) - 1/(2*π)*sin(α)
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γ(α) := γ0 - γΣ*αk(α)
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l(α) := Rc*cos(γ(α))
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Gc := mc*g
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Mg(α) := Gc*l(α)
Mg(α) := mc*g*Rc*cos(γ0 - γΣ*αk(α))
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Н*м
рад
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Mpr(α) := n*(Pус + (Pp - Pус)*αk(α))*lpr
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Н*м
рад
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β := 0, 0.01 .. 6.28
Rct := A - b + 0.01
Rct = 0.21  # м
A = 0.5  # м
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Ft := m2*g*f1
f1 = 0.3
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αc(β) := εкс(β)*Rc
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ck(β) := 2*π*sin(β)
αc(β) := ck(β)*γΣ/T^-2*Rc
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Fin1(β) := 0.5*mc*αc(β)
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QΣ1(β) := Ft + Fin1(β)  # error: bad_dimensions Unitless Magnetic Flux Density^2
QΣ1(β) := m2*g*f1 + 0.5*mc*εкс(β)*Rc
Ftd := 2*Pn*f2/sin(δ)
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Ftp := m1*g*f2
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Ftr := Ftd + Ftp
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Fn := Fvr + Ftr
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Fn := 2*Pn*f2/sin(δ) + m1*g*f2 + Fvr
Fin2 := 0.5*mc*εpp*Rpp
Rpp = 0.065
εpp = 5
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QΣ2 := Fn + Fin2
QΣ2 := 2*Pp*f2/sin(δ) + m1*g*f2 + Fvr + 0.5*mc*εpp*Rpp
QΣ(β) := QΣ1(β) + QΣ2
Mct(β) := QΣ(β)*Rct
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QΣ2 = 23.3743
Mct(β) := QΣ(β)*Rct  # Н*м
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Н*м
рад
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MΣ(α) := Mин(α) + Mg(α) - Mpr(α)
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Н*м
рад
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# Рассчитаем угловую скорость качающегося стола wkc, исходя из рабочей скорости автомата и того, что угол его поворота составляет 20 градусов.
# Определим время одного цикла tz в секундах
tz := ν/60
tz = 1.91667
# Время совершения одного оборота качающегося стола, учитывая, что за время одного цикла он проходит туда и обратно угол в 40 градусов, составит
tob := tz*9
tob = 17.25  # с
# Принимая во внимание то, что качающийся стол за время одного цикла имеет состояние выстоя, т. е. не движется, будем считать , что время совершения обного оборота, составит
tob1 := 15  # с
# Следовательно угловая скорость качающегося стола высчитается так
ωkc := 6*π/tob1
ωkc = 1.25664  # рад/с
# Определяем момент статического сопротивления на главном валу от процесса шитья
# Приделы интегрирования взяты из графика МS(a) = f(a)
α0 := 0
α1 := 3.17
α2 := 6.28
# при MΣ1 > 0
MΣ1 := integral(Mин(α) + Mg(α) - Mpr(α), α = α0 .. α1)
MΣ1 = 598.377  # Н*м
M1 := MΣ1*ωkc/(ω[1]*η)
M1 = 82.5504  # Н*м
# при MΣ2 < 0
Mct := 1.431  # Н*м
MΣ2 := integral(Mин(α) + Mg(α) - Mpr(α), α = α1 .. α2) + Mct
MΣ2 = -542.525  # Н*м
M2 := MΣ2*ωkc*η/ω[1]
M2 = -56.6503  # Н*м
ωkc = 1.25664
ω[1] = 10.47
# Расчетный момент статического сопротивления на валу двигателя равен:
# Угловая скорость главного вала w1= 10.47 рад/с
# В одном обороте 2p радиан
# Время поворота главного вала  tgv на один оборот, за который совершается один цикл шитья, составит
tgv := ω[1]/(2*π)
tgv = 1.66635  # c
# Рассчитаем время поворота главного вала на угол a1 и угол a2
t[1] := α1*tgv/α2
t[2] := (α2 - α1)*tgv/α2
t[1] = 0.841136  # c
t[2] = 0.825216  # c
# Для выбора двигателя по мощности воспользуемся методом эквивалентного момента
Mэкв := sqrt((M1^2*t[1] + M2^2*t[2])/(t[1] + t[2]))
Mэкв = 70.9164  # Н*м
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k := 1
ηзп := 0.96
i[1] := 2
ηпп := 0.99
i[2] := 5
ηкп := 0.94
# где  i[1] - передаточное отношение между выходным валом ЭМС и приводным
# шкивом;
# i[2] - передаточное отношение между цилинрической прямозубой шестерней,
# закрепленной на одном валу со шкивом, и зубчатым колесом на главном
# валу ниткошвейного автомата;
# k - коэффициент, учитывающий потери мощности в переходных процессах,
# приводной двигатель работает в продолжительном режиме и поэтому
# переходные процессы не оказывают влияния на выбор двигателя по
# мощности;
# ηзп - КПД зубчатой передачи;
# ηпп - КПД пар подшипников;
# ηкп - КПД клиноременной передачи
# Скорость вала приводного двигателя определится так
ωv := ω[1]*i[1]*i[2]
ωv = 104.7  # c^-1
# Расчетное значение момента вычисляется по формуле
Mрасч := Mэкв/(i[1]*i[2]*ηзп*ηпп^3*ηкп)
Mрасч = 8.0992  # Н*м
# Расчетное значение мощности составит
Pрасч := k*Mрасч*ωv
Pрасч = 847.986  # Вт
# Привод ниткошвейного автомата обладает разветвленными кинематическими звеньями, которые используются для привода различных исполнительных элементов и узлов, например привод счетно-распределительного устройства. самонаклада, тормозной шкив и т. п.
# Все эти вращающиеся части запасают кинетическую энергию, которая используется для выполнения основного технологического процесса.
#
# Этот прием позволяет снизить мощность приводного двигателя, который накачивает кинетической энергией движущиеся части автомата.
# Определим расчетное значение момента на быстроходном валу автомата, на котором расположены большого диаметра шкив клиноременной передачи, тормозной шкив и зубчатая шестерня.
i[2] := 5
ηзп := 0.96
ηпп := 0.99
Mэкв = 70.9164
Mрасчв := Mэкв/(i[2]*ηзп*ηпп^3)
Mрасчв = 15.2265
# Работа, совершаемая инерционными массами Jin, расположенными на главном валу:
# По данным научно-технической литературы
Jin := 0.45  # кг*м^2
Тогда
Av := Jin*ω[1]^2/2
Av = 24.6647
# Момент, создаваемый этими инерционными массами:
Mim := Av/ω[1]
Mim = 2.35575  # Н*м
# Тогда расчетное значение момента на главном валу автомата составит
Mрасчв1 := Mрасчв - Mim
Mрасчв1 = 12.8707
# Окончательное расчетное значение момента на валу двигателя вычисляется по формуле
Mрок := Mрасчв1/(i[1]*ηкп)
Mрок = 6.84614  # Н*м
# По данному расчетному значению момента рассчитывается мощность приводного электродвигателя
Pрок := k*Mрок*ωv
Pрок = 716.791  # Вт
# Из каталога на электрические машины по полученному значению Ррок и определенному значению  скорости выбирается двигатель, соблюдая условия: Рном > Р дв, а  ωv примерно равна  wном  :
#
# Асинхронный двигатель АИР80А6У3
# P_ном = 0,75  кВт
# U_ном = 220/380 В
# n_ном  = 1000 об/мин
# s_ном_. = 8 %,
# М_ном = 7,78 Н*м
# η_ном  = 74 %
# cosφ_ном =  0,74
# λ_1 = I_max / I_ном = 2,2
# J_дв = 0,0031 кг*м^2
# Проверка двигателя по перегрузочной способности
# Условие проверки
Mmax > Mрасчв + Mdin
# Определим максимальное значение момента двигателя
Mnom := 7.78
λI := 2.2
Mmax := Mnom*λI
Mmax = 17.116
# Mdin момент динамический, возникающий при пуске автомата
# Момент инерции качающего стола, который действует на главном валу
Mmax == (17.116 > Mрасчв) == 12.975
Jkc := 1.75  # кг*м^2
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# Расчет момента инерции шкива клиноременной передачи, расположенного на главном валу автомата
# r1 - внешний радиус шкива
r1 := 0.150  # м
# r2 - внутренний радиус шкива
r2 := 0.120  # м
# g - удельный вес материала, из которого сделан шкив
γ := 7800  # кг/м^3
# b - ширина шкива
bm := 0.034  # м
# mm - масса шкива
mm := π*γ*b*(r1^2 - r2^2)
mm = 59.5457
# Момент инерции
Jm := mm*(r1^2 - r2^2)/2
Jm = 0.24116  # кг*м^2
